// COMSOL Multiphysics 4.3.2.152 model "multi_coil_circular.mph"
// Outline of the model tree

Parameters
  Ro = 0.05[m]  // outer radius of coil
  Rth = 0.02[m]  // coil thickness
  Lcoil = 0.1[m]  // coil length

Geometry
  geom1 "Geometry 1" (3D, length unit m)
    wp1: WorkPlane | quickplane = xz; quickz = 0
      r1: Rectangle | pos = {Ro-Rth, -Lcoil/2}; size = {Rth+(Rth/2), Lcoil+0.33*Lcoil}
      c1: Circle | rot = -90; r = 4*Ro; angle = 180
    rev1: Revolve | input = wp1
    fin: Finalize "Form Union"

Materials
  mat1 "Air" on all domains
    def "Basic"
      relpermeability = 1
      relpermittivity = 1
      dynamicviscosity = eta(T[1/K])[Pa*s]
      ratioofspecificheat = 1.4
      electricconductivity = 1[S/m]
      heatcapacity = Cp(T[1/K])[J/(kg*K)]
      density = rho(pA[1/Pa],T[1/K])[kg/m^3]
      thermalconductivity = k(T[1/K])[W/(m*K)]
      soundspeed = cs(T[1/K])[m/s]
      eta: Piecewise | arg = T; extrap = constant; pieces = {200.0, 1600.0, -8.38278E-7+8.35717342E-8*T^1-7.69429583E-11*T^2+4.6437266E-14*T^3-1.06585607E-17*T^4}
      Cp: Piecewise | arg = T; extrap = constant; pieces = {200.0, 1600.0, 1047.63657-0.372589265*T^1+9.45304214E-4*T^2-6.02409443E-7*T^3+1.2858961E-10*T^4}
      rho: Analytic | expr = pA*0.02897/8.314/T; args = {pA, T}; dermethod = manual; argders = {{pA, d(pA*0.02897/8.314/T,pA)}, {T, d(pA*0.02897/8.314/T,T)}}
      k: Piecewise | arg = T; extrap = constant; pieces = {200.0, 1600.0, -0.00227583562+1.15480022E-4*T^1-7.90252856E-8*T^2+4.11702505E-11*T^3-7.43864331E-15*T^4}
      cs: Analytic | expr = sqrt(1.4*287*T); args = T; dermethod = manual; argders = {T, d(sqrt(1.4*287*T),T)}
  mat2 "Potting material" on domains 2
    def "Basic"
      relpermeability = 1
      relpermittivity = 1

Physics
  mf: InductionCurrents "Magnetic Fields" on all domains
    dependent variable A = {Ax, Ay, Az}
    al1: AmperesLaw "Ampère's Law 1" (default)
    mi1: MagneticInsulation (default)
    init1: init "Initial Values 1" (default)
    mtcd1: MultiTurnCoilDomain on domains 2 | CoilType = Circular; N = 1000; AreaFrom = AWG; AWGArea = 36
      cre1: CoilReferenceEdge "Reference Edge 1" on edges 10, 11, 24, 41

Mesh
  mesh1 "Mesh 1" (physics-controlled)
    size: MeshSizeDefault | hauto = 5

Studies
  std1 "Study 1"
    freq: Frequency "Frequency Domain" | plist = range(1000,10000,1000000)

Solver configurations
  sol1 "Solver 1" (study std1)
    v1: Variables "Dependent Variables 1"
    s1: Stationary "Stationary Solver 1" | stol = 0.0010
      p1: Parametric | pname = freq; plistarr = range(1000,10000,1000000)
      fc1: FullyCoupled | linsolver = i1
      i1: Iterative | linsolver = fgmres
        mg1: Multigrid

Datasets
  dset1: Solution | solution = sol1

Tables
  tbl1: Table
    // Global Evaluation 1 (mf.RCoil_1)
    Coil resistance (Ω)
    0.0523558
  tbl2: Table
    // Global Evaluation 2 (2*mf.intWm/(1[A])^2)
    2*mf.intWm/(1[A])^2 (H)
    5.63607e-06

Plots
  pg1: PlotGroup3D "Magnetic Flux Density Norm (mf)" | data = dset1
    mslc1: Multislice | expr = mf.normB
  pg2: PlotGroup1D "1D Plot Group 2" | data = dset1
    glob1: Global
      expr = mf.RCoil_1+((mf.LCoil_1*mf.omega)-(1/(mf.omega*10^-6)))
      descr = Coil resistance
      xdata = expr
      freqmin = 1000
      freqmax = 10000
      xdataexpr = freq
      autoexpr = off
    ptgr1: PointGraph (disabled) on points 22 | expr = mf.RCoil_1+mf.XCoil_1; xdata = expr; xdataexpr = freq

Exports
  data1: Data
    data = dset1
    expr = {mf.ZCoil_1, mf.RCoil_1, mf.XCoil_1}
    filename = C:\Users\welcome\Desktop\output1.csv
    location = fromdataset