// COMSOL Multiphysics 4.3a (Build: 110) model "multi_coil_linear.mph"
// Outline of the model tree

Parameters
  Ri = 2[mm]  // tube radius

Geometry
  geom1 "Geometry 1" (3D, length unit m)
    cyl1: Cylinder | r = 10*Ri; h = 10*Ri
    cyl2: Cylinder | r = Ri; h = 10*Ri
    fin: Finalize "Form Union"

Materials
  mat1 "Air" on all domains
    def "Basic"
      relpermeability = 1
      relpermittivity = 1
      dynamicviscosity = eta(T[1/K])[Pa*s]
      ratioofspecificheat = 1.4
      electricconductivity = 0[S/m]
      heatcapacity = Cp(T[1/K])[J/(kg*K)]
      density = rho(pA[1/Pa],T[1/K])[kg/m^3]
      thermalconductivity = k(T[1/K])[W/(m*K)]
      soundspeed = cs(T[1/K])[m/s]
      eta: Piecewise | arg = T; extrap = constant; pieces = {200.0, 1600.0, -8.38278E-7+8.35717342E-8*T^1-7.69429583E-11*T^2+4.6437266E-14*T^3-1.06585607E-17*T^4}
      Cp: Piecewise | arg = T; extrap = constant; pieces = {200.0, 1600.0, 1047.63657-0.372589265*T^1+9.45304214E-4*T^2-6.02409443E-7*T^3+1.2858961E-10*T^4}
      rho: Analytic | expr = pA*0.02897/8.314/T; args = {pA, T}; dermethod = manual; argders = {{pA, d(pA*0.02897/8.314/T,pA)}, {T, d(pA*0.02897/8.314/T,T)}}
      k: Piecewise | arg = T; extrap = constant; pieces = {200.0, 1600.0, -0.00227583562+1.15480022E-4*T^1-7.90252856E-8*T^2+4.11702505E-11*T^3-7.43864331E-15*T^4}
      cs: Analytic | expr = sqrt(1.4*287*T); args = T; dermethod = manual; argders = {T, d(sqrt(1.4*287*T),T)}
  mat2 "Potting material" on domains 2
    def "Basic"
      relpermeability = 1
      relpermittivity = 1

Physics
  mf: InductionCurrents "Magnetic Fields" on all domains
    dependent variable A = {Ax, Ay, Az}
    al1: AmperesLaw "Ampère's Law 1" (default)
    mi1: MagneticInsulation (default)
    init1: init "Initial Values 1" (default)
    mtcd1: MultiTurnCoilDomain on domains 2 | CoilType = Linear; CoilName = 1; N = 10
      cre1: CoilReferenceEdge "Reference Edge 1" on edges 14

Mesh
  mesh1 "Mesh 1" (physics-controlled)
    size: MeshSizeDefault | hauto = 5

Studies
  std1 "Study 1"
    stat: Stationary | notsolmethod = sol; notstudy = std1; sweeptype = sparse

Solver configurations
  sol1 "Solver 1" (study std1)
    v1: Variables "Dependent Variables 1"
    s1: Stationary "Stationary Solver 1"
      fc1: FullyCoupled | linsolver = i1
      i1: Iterative | linsolver = fgmres; prefuntype = left; rhob = 400; maxlinit = 10000
        mg1: Multigrid
          prefun = gmg
          iter = 2
          mgcycle = v
          mcasegen = any
          gmglevels = 1
          scale = 2
          massem = on
          rmethod = longest
          mglevels = 5
          maxcoarsedof = 5000
          amgauto = 3

Datasets
  dset1: Solution | solution = sol1

Derived values
  gev1: EvalGlobal "Resistance" | data = dset1; table = tbl1; expr = mf.RCoil_1
  gev2: EvalGlobal "Inductance" | data = dset1; table = tbl2; expr = 2*mf.intWm/(1[A])^2

Tables
  tbl1: Table
    // Global Evaluation 1 (mf.RCoil_1)
    Coil resistance (Ω)
    0.00333333
  tbl2: Table
    // Global Evaluation 2 (2*mf.intWm/(1[A])^2)
    2*mf.intWm/(1[A])^2 (H)
    1.02088e-06

Plots
  pg1: PlotGroup3D "Magnetic flux density, norm" | data = dset1
    mslc1: Multislice | expr = mf.normB; unit = T
    arwv1: ArrowVolume | expr = {mf.Bx, mf.By, mf.Bz}; arrowlength = proportional
  pg2: PlotGroup3D "Current" | data = dset1
    mslc1: Multislice | expr = mf.normJ; unit = A/m^2
    arwv1: ArrowVolume | expr = {mf.Jx, mf.Jy, mf.Jz}; znumber = 5