// COMSOL Multiphysics 4.3a (Build: 110) model "multi_coil_numeric_symmetry_half.mph"
// Outline of the model tree

Geometry
  geom1 "Geometry 1" (3D, length unit m)
    wp1: WorkPlane | quickz = -0.05
      r1: Rectangle | base = center; size = {0.1, 0.05}
      r2: Rectangle | base = center; size = {0.08, 0.03}
      b1: BezierPolygon "Bézier Polygon 1" | p = {{0, 0}, {0.03, -0.03}}; degree = 1; w = {1, 1}; type = solid
      csol1: ConvertToSolid | input = b1, r1, r2
      spl1: Split | input = csol1
      del1: Delete "Delete Entities 1" | input = spl1(1), spl1(2), spl1(4)
      fil2: Fillet | point = spl1(3) entities 7, 8; radius = 0.02
      fil1: Fillet | point = fil2(1) entities 7, 8; radius = 0.01
    ext1: Extrude | input = wp1; distance = 0.1
    wp2: WorkPlane | quickplane = yz
      c1: Circle | rot = 90; r = 0.2; angle = 180
    rev1: Revolve | input = wp2; angle2 = 180
    fin: Finalize "Form Union"

Materials
  mat1 "Air" on all domains
    def "Basic"
      relpermeability = 1
      relpermittivity = 1
      dynamicviscosity = eta(T[1/K])[Pa*s]
      ratioofspecificheat = 1.4
      electricconductivity = 0[S/m]
      heatcapacity = Cp(T[1/K])[J/(kg*K)]
      density = rho(pA[1/Pa],T[1/K])[kg/m^3]
      thermalconductivity = k(T[1/K])[W/(m*K)]
      soundspeed = cs(T[1/K])[m/s]
      eta: Piecewise | arg = T; extrap = constant; pieces = {200.0, 1600.0, -8.38278E-7+8.35717342E-8*T^1-7.69429583E-11*T^2+4.6437266E-14*T^3-1.06585607E-17*T^4}
      Cp: Piecewise | arg = T; extrap = constant; pieces = {200.0, 1600.0, 1047.63657-0.372589265*T^1+9.45304214E-4*T^2-6.02409443E-7*T^3+1.2858961E-10*T^4}
      rho: Analytic | expr = pA*0.02897/8.314/T; args = {pA, T}; dermethod = manual; argders = {{pA, d(pA*0.02897/8.314/T,pA)}, {T, d(pA*0.02897/8.314/T,T)}}
      k: Piecewise | arg = T; extrap = constant; pieces = {200.0, 1600.0, -0.00227583562+1.15480022E-4*T^1-7.90252856E-8*T^2+4.11702505E-11*T^3-7.43864331E-15*T^4}
      cs: Analytic | expr = sqrt(1.4*287*T); args = T; dermethod = manual; argders = {T, d(sqrt(1.4*287*T),T)}
  mat2 "Potting material" on domains 2
    def "Basic"
      relpermeability = 1
      relpermittivity = 1

Physics
  mf: InductionCurrents "Magnetic Fields" on all domains
    dependent variable A = {Ax, Ay, Az}
    al1: AmperesLaw "Ampère's Law 1" (default)
    mi1: MagneticInsulation (default)
    init1: init "Initial Values 1" (default)
    mtcd1: MultiTurnCoilDomain on domains 2 | CoilType = Numeric
      ccc1: CoilCurrentCalculation "Automatic Current Calculation 1" on all domains
        ci1: CoilInsulation "Electric Insulation 1" on all boundaries
        ct1: CoilTerminal "Input 1" on boundaries 12
        cg1: CoilGround "Output 1" on boundaries 2-8, 10, 11, 13-20

Mesh
  mesh1 "Mesh 1"
    size: MeshSizeDefault | hauto = 8
    ftet2: FreeTet "Free Tetrahedral 2" on remaining entities
      size1: Size on no boundaries | hmax = 0.01; hauto = 5; custom = on

Studies
  std1 "Study 1"
    ccc: CoilCurrentCalculation | neigs = 1
    stat: Stationary | notsolmethod = sol; notstudy = std1; sweeptype = sparse

Solver configurations
  sol1 "Solver 1" (study std1)
    v1: Variables "Dependent Variables 1"
    e1: Eigenvalue "Eigenvalue Solver 1" | neigs = 1; shift = 0
      dDef: Direct
    su1: StoreSolution
    v2: Variables "Dependent Variables 2" | initmethod = sol; notsolmethod = sol
    s1: Stationary "Stationary Solver 1"
      fc1: FullyCoupled | linsolver = i1
      i1: Iterative | linsolver = fgmres; prefuntype = left; rhob = 400; maxlinit = 10000
        mg1: Multigrid
          prefun = gmg
          iter = 2
          mgcycle = v
          mcasegen = any
          gmglevels = 1
          scale = 2
          massem = on
          rmethod = longest
          mglevels = 5
          maxcoarsedof = 5000
          amgauto = 3
  sol2 "Store Solution 2" (study std1)

Datasets
  dset1: Solution | solution = sol1
  dset2: Solution | solution = sol2

Derived values
  gev1: EvalGlobal "Resistance" | data = dset1; table = tbl1; expr = 2*mf.RCoil_1
  gev2: EvalGlobal "Inductance" | data = dset1; table = tbl2; expr = 2*2*mf.intWm/(1[A])^2

Tables
  tbl1: Table
    // Global Evaluation 1 (2*mf.RCoil_1)
    2*mf.RCoil_1 (Ω)
    0.0391
  tbl2: Table
    // Global Evaluation 2 (2*2*mf.intWm/(1[A])^2)
    2*2*mf.intWm/(1[A])^2 (H)
    2.8813e-06

Plots
  pg1: PlotGroup3D "Magnetic flux density, norm" | data = dset1
    mslc1: Multislice | expr = mf.normB; unit = T; multiplanexmethod = coord; xcoord = 0
    arwv1: ArrowVolume | expr = {mf.Bx, mf.By, mf.Bz}; xnumber = 15; ynumber = 1; znumber = 15; arrowlength = logarithmic
    arwv2: ArrowVolume
      expr = {mf.Bx, mf.By, mf.Bz}
      arrowxmethod = coord
      xnumber = 15
      xcoord = 0
      ynumber = 15
      znumber = 15
      arrowlength = logarithmic
  pg2: PlotGroup3D "Current" | data = dset1
    mslc1: Multislice | expr = mf.normJ; unit = A/m^2; multiplanexmethod = coord; xcoord = 0
    arwv1: ArrowVolume | expr = {mf.Jx, mf.Jy, mf.Jz}; xnumber = 100; ynumber = 100; znumber = 1