echo            screen
variable        dcdfreq index 5000
variable        inputname  index step6.4_equilibration
variable        outputname index step6.5_equilibration

units           real
boundary        p p p

newton          off
pair_style      lj/charmmfsw/coul/long 10 12
pair_modify     mix arithmetic
kspace_style    pppm 1e-6

atom_style      full
bond_style      harmonic
angle_style     charmm
dihedral_style  charmmfsw
improper_style  harmonic
special_bonds   charmm
timestep        2

read_data       step5_assembly.data
variable        laststep file ${inputname}.dump
next            laststep
read_dump       ${inputname}.dump ${laststep}  x y z vx vy vz ix iy iz box yes replace yes format native

neighbor        2 bin
neigh_modify    delay 5 every 1

include         restraints/constraint_angletype
fix             1 all shake 1e-6 500 ${dcdfreq} m 1.008 a ${constraint_angletype}
fix             2 all npt temp 303.15 303.15 100.0 iso 0.9869233 0.9869233 1000 couple xy mtk no pchain 0
shell           sed -e "s/\$fc/0.2/g" -e "s/\$bb/0.5/g"  membrane_lipid_restraint.lammps.col > restraints/${outputname}.col
fix             restraint all colvars restraints/${outputname}.col output ${outputname}
shell           tr '[A-Z]' '[a-z]' < restraints/dihe.restraint |sed -e "s/\$fc/50/g" > restraints/${outputname}.dihe
include         restraints/${outputname}.dihe

thermo          ${dcdfreq}
thermo_style    custom step time xlo xhi ylo yhi zlo zhi etotal pe ke temp press ebond eangle edihed eimp evdwl ecoul elong temp vol
dump            1 all dcd ${dcdfreq} ${outputname}.dcd
dump_modify     1 unwrap yes
write_data      ${outputname}.data

reset_timestep  0
run             100000

write_dump      all custom ${outputname}.dump id type x y z vx vy vz ix iy iz
